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/COM,ANSYS RELEASE                   BUILD 19.5      UP20190805       14:46:58
/PREP7
/TITLE,Cube--Transient Thermal (A5)
ANTYPE, 4
TOFFST,  273.150000
TRNOPT,FULL,,,,,NMK ,,,NO
STEF, 5.669000000E-08
THOPT,FULL
DMPOPT,ESAV,NO
DMPOPT,EMAT,NO
*IF,_CDRDOFF,EQ,1,THEN     !if solid model was read in
_CDRDOFF=             !reset flag, numoffs already performed
*ELSE              !offset database for the following FE model
NUMOFF,NODE,       65
NUMOFF,ELEM,       90
NUMOFF,MAT ,        2
NUMOFF,REAL,        2
NUMOFF,TYPE,        2
*ENDIF
*SET,TEMPERATURE,'TEMP                            '
*SET,_ASMDIAG, 0.1714730299493
*SET,_DS_PROGRESS,  999.0000000000
*SET,_MAXELEMNUM,  90.00000000000
*SET,_MAXELEMTYPE,  2.000000000000
*SET,_MAXNODENUM,  65.00000000000
*SET,_MAXREALCONST,  1.000000000000
*SET,_NUMELEM,  36.00000000000
*SET,_NUMNODE,  65.00000000000
*SET,_RETURN ,  0.000000000000
*SET,_STATUS ,  0.000000000000
*SET,_WALLBSOL,  14.78277777778
*SET,_WALLSTRT,  14.78277777778
*SET,_WB_PROJECTSCRATCH_DIR(1,       1,       1),'/scratch/ws/0/jack_sb-FSplayground_00003/Erno/_Workbench/_ProjectScratch/ScrA82F/                                                                                                                                                                       '
*SET,_WB_SOLVERFILES_DIR(1,       1,       1),'/scratch/ws/0/jack_sb-FSplayground_00003/Erno/_Workbench/Cube_files/dp0/SYS/MECH/                                                                                                                                                                       '
*SET,_WB_USERFILES_DIR(1,       1,       1),'/scratch/ws/0/jack_sb-FSplayground_00003/Erno/_Workbench/Cube_files/user_files/                                                                                                                                                                         '
*SET,_XMAX   , 0.9900000000000E-01
*SET,_XMIN   ,  0.000000000000
*SET,_YMAX   , 0.9900000000000E-01
*SET,_YMIN   ,  0.000000000000
*SET,_ZMAX   ,  0.000000000000
*SET,_ZMIN   ,-0.9900000000000E-01
DOF,DELETE
ET,        1, 70
ET,        2,152
KEYOP,        2, 4,        1
KEYOP,        2, 5,        1
KEYOP,        2, 9,        1
RLBLOCK,       1,       2,       6,       7
(2i8,6g16.9)
(7g16.9)
       2       6  1.00000000     0.566900000E-07  0.00000000      0.00000000      0.00000000      0.00000000
NBLOCK,6,SOLID,        65,        65
(3i9,6e21.13e3)
        1        0        0 6.6000000000000E-002 6.6000000000000E-002-6.6000000000000E-002
        2        0        0 3.3000000000000E-002 6.6000000000000E-002-6.6000000000000E-002
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N,R5.3,LOC,       -1,
EBLOCK,19,SOLID,        90,        36
(19i10)
         1         1         1         1         0         0         0         0         8         0         1         1        61        57        50        12        64        58        54
         1         1         1         1         0         0         0         0         8         0         2         1        50        57        61         2        52        56        59
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        -1
CMBLOCK,INTERFACE,NODE,      16  ! users node component definition
(8i10)
        25        26        27        28        29        30        31        32
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CMBLOCK,_ELMISC ,ELEM,       2  ! users element component definition
(8i10)
        82       -90
CMBLOCK,_SPND56 ,NODE,       1  ! users node component definition
(8i10)
        65
EMUNIT,MKS  , 0.125663706E-05
MPTEMP,R5.0, 1, 1,  0.00000000    ,
MPDATA,R5.0, 1,EX  ,       1, 1, 2.000000000E+11,
MPTEMP,R5.0, 1, 1,  0.00000000    ,
MPDATA,R5.0, 1,NUXY,       1, 1, 0.300000000    ,
MPTEMP,R5.0, 1, 1,  0.00000000    ,
MPDATA,R5.0, 1,ALPX,       1, 1, 1.200000000E-05,
MPTEMP,R5.0, 1, 1,  0.00000000    ,
MPDATA,R5.0, 1,DENS,       1, 1,  7850.00000    ,
MPTEMP,R5.0, 1, 1,  0.00000000    ,
MPDATA,R5.0, 1,KXX ,       1, 1,  60.5000000    ,
MPTEMP,R5.0, 1, 1,  0.00000000    ,
MPDATA,R5.0, 1,RSVX,       1, 1, 1.700000000E-07,
MPTEMP,R5.0, 1, 1,  0.00000000    ,
MPDATA,R5.0, 1,C   ,       1, 1,  434.000000    ,
MPTEMP,R5.0, 1, 1,  0.00000000    ,
MPDATA,R5.0, 1,MURX,       1, 1,  10000.0000    ,
MPTEMP,R5.0, 1, 1,  0.00000000    ,
MPDATA,R5.0, 1,EMIS,       2, 1, 0.880000000    ,
EXTOPT,ATTR,      0,      0,      0
EXTOPT,ESIZE,  0,  0.0000
EXTOPT,ACLEAR,      0
KBC,     1,     0
TREF,  0.00000000
IRLF,  0
BFUNIF,TEMP,  19.8500000
ACEL,  0.00000000    ,  0.00000000    ,  0.00000000
OMEGA,  0.00000000    ,  0.00000000    ,  0.00000000
DOMEGA,  0.00000000    ,  0.00000000    ,  0.00000000
CGLOC,  0.00000000    ,  0.00000000    ,  0.00000000
CGOMEGA,  0.00000000    ,  0.00000000    ,  0.00000000
DCGOMG,  0.00000000    ,  0.00000000    ,  0.00000000
AUTOTS,ON
NSUBST,       100,      1000,        10,
KUSE,     0
TIME,  1.00000000
ALPHAD,  0.00000000
BETAD,  0.00000000
DMPRAT,  0.00000000
DMPSTR,  0.00000000
TIMINT,ON  ,THER
TINTP,     0.0050000, , ,    -1.0000000,     0.5000000,    -1.0000000,     0.0000000,     0.9000000, 0
CNVTOL,HEAT,  0.00000000    , 1.000000000E-03,  2, 1.000000000E-06
CRPLIM, 0.100000000    ,   0
CRPLIM,  0.00000000    ,   1
NCNV,     1,  0.00000000    ,     0,  0.00000000    ,  0.00000000

NEQIT,     0

ERESX,DEFA
OUTRES, ALL,NONE,
OUTRES,NSOL, ALL,
OUTRES,RSOL, ALL,
OUTRES,EANG, ALL,
OUTRES,VENG, ALL,
OUTRES,FFLU, ALL,
OUTRES,CONT, ALL,
OUTRES,MISC, ALL,_ELMISC
D,     65,TEMP,  22.0000000    ,  0.00000000
FINISH
